**
** Heading +++++++++++++++++++++++++++++++++++++++++++++++++
**
*Heading
Hash: Uc3VFKEz, Date: 06/13/2022, Unit system: MM_TON_S_C
**
** Nodes +++++++++++++++++++++++++++++++++++++++++++++++++++
**
*Node
1, 1.00000000E+003, 5.00000000E+002, 0.00000000E+000
2, -1.00000000E+003, 5.00000000E+002, 0.00000000E+000
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**
** Elements ++++++++++++++++++++++++++++++++++++++++++++++++
**
*Element, Type=S8R, Elset=Shell_part-1
1, 1, 3, 277, 253, 48, 1267, 1268, 276
2, 3, 4, 278, 277, 49, 1269, 1270, 1267
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**
** Node sets +++++++++++++++++++++++++++++++++++++++++++++++
**
*Nset, Nset=Internal_Selection-1_x-symmetry
2, 94, 95, 96, 97, 98
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*Nset, Nset=Internal_Selection-1_y-symmetry
1, 2, 3, 4, 5, 6
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*Nset, Nset=Internal_Selection-1_Displacement_rotation-1
1, 94, 140, 141, 142, 143
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*Nset, Nset=Internal-1_Internal_Selection-1_pressure
1, 2, 3, 4, 5, 6
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*Nset, Nset=Internal_Selection-1_NH_output-1
2
**
** Element sets ++++++++++++++++++++++++++++++++++++++++++++
**
*Elset, Elset=plate
1, 2, 3, 4, 5, 6
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*Elset, Elset=Internal-1_Internal_Selection-1_pressure_S2
1, 2, 3, 4, 5, 6
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*Elset, Elset=Missing_section-1
1, 2, 3, 4, 5, 6
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*Elset, Elset=Missing_section-2
1, 2, 3, 4, 5, 6
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*Elset, Elset=Missing_section-3
1, 2, 3, 4, 5, 6
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*Elset, Elset=Missing_section-4
1, 2, 3, 4, 5, 6
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*Elset, Elset=Missing_section-5
1, 2, 3, 4, 5, 6
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**
** Surfaces ++++++++++++++++++++++++++++++++++++++++++++++++
**
*Surface, Name=Internal_Selection-1_pressure, Type=Element
Internal-1_Internal_Selection-1_pressure_S2, S2
**
** Physical constants ++++++++++++++++++++++++++++++++++++++
**
**
** Materials +++++++++++++++++++++++++++++++++++++++++++++++
**
*Material, Name=Composite
*Elastic, Type=ENGINEERING CONSTANTS
133860., 7706., 7706., 0.301, 0.301, 0.396, 4306., 4306.,
2760., 20.
**
** Sections ++++++++++++++++++++++++++++++++++++++++++++++++
**
*Shell section, Elset=plate, Material=composite, Offset=0
10
**
** Pre-tension sections ++++++++++++++++++++++++++++++++++++
**
**
** Constraints +++++++++++++++++++++++++++++++++++++++++++++
**
**
** Surface interactions ++++++++++++++++++++++++++++++++++++
**
**
** Contact pairs +++++++++++++++++++++++++++++++++++++++++++
**
**
** Amplitudes ++++++++++++++++++++++++++++++++++++++++++++++
**
**
** Initial conditions ++++++++++++++++++++++++++++++++++++++
**
**
** Steps +++++++++++++++++++++++++++++++++++++++++++++++++++
**
**
** Step-1 ++++++++++++++++++++++++++++++++++++++++++++++++++
**
*Step, Inc=100
*Static
0.01, 1, 1E-05, 1
**
** Boundary conditions +++++++++++++++++++++++++++++++++++++
**
*Boundary, op=New
** Name: x-symmetry
*Boundary
Internal_Selection-1_x-symmetry, 1, 1, 0
Internal_Selection-1_x-symmetry, 5, 5, 0
Internal_Selection-1_x-symmetry, 6, 6, 0
** Name: y-symmetry
*Boundary
Internal_Selection-1_y-symmetry, 2, 2, 0
Internal_Selection-1_y-symmetry, 4, 4, 0
Internal_Selection-1_y-symmetry, 6, 6, 0
** Name: simple-support
*Boundary
Internal_Selection-1_Displacement_rotation-1, 3, 3, 0
**
** Loads +++++++++++++++++++++++++++++++++++++++++++++++++++
**
*Cload, op=New
*Dload, op=New
** Name: pressure
*Dload
Internal-1_Internal_Selection-1_pressure_S2, P2, -0.00012
**
** Defined fields ++++++++++++++++++++++++++++++++++++++++++
**
**
** History outputs +++++++++++++++++++++++++++++++++++++++++
**
*Node print, Nset=Internal_Selection-1_NH_output-1
RF, U
**
** Field outputs +++++++++++++++++++++++++++++++++++++++++++
**
*El file
S, E
*Node file
RF, U
**
** End step ++++++++++++++++++++++++++++++++++++++++++++++++
**
*End step
